// SBML level 2 version 4

model MAPK()
  // MAPK
  // (C)AppliedBioMath LLC, 2020 DKirouac 2-3-2020

  // Compartments:
  compartment CELL = 1;

  // Species:
  substanceOnly species RTK1 in CELL;  // substance in mole
  substanceOnly species RAS in CELL = 1;  // substance in mole
  substanceOnly species BRAF in CELL;  // substance in mole
  substanceOnly species MEK in CELL;  // substance in mole
  substanceOnly species ERK in CELL;  // substance in mole
  substanceOnly species S6 in CELL;  // substance in mole
  substanceOnly species TD1 in CELL = 0;  // substance in mole
  substanceOnly species CELLS in CELL = 1;  // substance in mole
  species FB1 in CELL = 0;
  substanceOnly species FB2 in CELL = 0;  // substance in mole
  substanceOnly species FB3 in CELL = 0;  // substance in mole
  substanceOnly species PI3K in CELL;  // substance in mole
  substanceOnly species AKT in CELL;  // substance in mole
  substanceOnly species RTK2 in CELL;  // substance in mole
  substanceOnly species RASi_gut in CELL = 0;  // substance in mole
  substanceOnly species RASi_blood in CELL = 0;  // substance in mole
  species RASi_C1 in CELL;
  species RASi_C2 in CELL;
  species RASmut in CELL = 0;
  species RASi_tumor in CELL = 0;
  species RAS_GDP in CELL = 0;
  species RASmut_GDP in CELL = 0;
  species RASmut_GDPi in CELL = 0;
  species RAS_GDPi in CELL = 0;
  species RASi_tumor_V2 in CELL = 0; RASi_tumor_V2 is "RASi_tumor/V2";
  species RASi_peripheral in CELL = 0;
  species xFB1 in CELL = 0;
  species xFB2 in CELL = 0;
  species xFB3 in CELL = 0;
  species FB4 in CELL = 0;
  species xFB4 in CELL = 0;

  // Parameters:
  k3 = 1;
  tau3 = 1 mole;
  MEKt = 1 mole;
  MEKb = 0 mole;
  k2 = 1;
  tau2 = 1 mole;
  ERKb = 0 mole;
  ERKt = 1 mole;
  k4 = 1;
  kFB1 = 1 MWDERIVEDUNIT_1__hour;
  tauFB1 = 1 mole;
  tau4 = 1 mole;
  S6b = 0 mole;
  S6t = 1 mole;
  k6 = 1;
  tau6 = 1 mole;
  Vmax = 10 mole;
  dmax = 0 MWDERIVEDUNIT_mole__hour;
  kg = 1;
  taug = 1 mole;
  umax = 1 MWDERIVEDUNIT_mole__hour;
  wOR = 0.8;
  AKTb = 1 mole;
  AKTt = 1 mole;
  k8 = 1;
  tau8 = 1 mole;
  PI3Kb = 1 mole;
  PI3Kt = 1 mole;
  k7 = 1;
  tau7 = 1 mole;
  kFB2 = 1;
  tauFB2 = 1 mole;
  kFB3 = 1;
  tauFB3 = 1 mole;
  BRAFb = 1 mole;
  BRAFt = 1 mole;
  G13 = 1;
  G23 = 1;
  RTK2b = 1;
  RTK2t = 1;
  RTK1b = 1;
  RTK1t = 1;
  V1 = 1;
  V2 = 1;
  wRAS = 1;
  r2 = 1;
  r3 = 1;
  r1 = 1;
  r5 = 1;
  Gdusp = 1;
  Gspry = 1;
  Fa = 1;
  ka = 1;
  ke = 1;
  k12 = 1;
  k21 = 1;
  ksynth = RAS_ss*kdeg*V2;
  kdeg = reallog(2)/RAS_thalf;
  kf = 1;
  kr = 1;
  kf_mut = 1;
  kr_mut = 1;
  RAS_thalf = 1;
  ksynth_mut = RASmut_ss*kdeg*V2;
  RAS_ss = 1;
  RASmut_ss = 1;
  kon = 1;
  Vp = 1;
  kp = 1;
  fb = 1;
  deg1 = 1;
  deg2 = 1;
  deg3 = 1;
  G4 = 1;
  kFB4 = 1;
  tauFB4 = 1;
  deg4 = 1;
  r4 = 1;

  // Assignment rules:
  MEK := MEKb + (MEKt - MEKb)*HillEQ(BRAF, k3, tau3);
  BRAF := (BRAFb + (BRAFt - BRAFb)*HillEQ(RAS/V2 + RASmut/V2, k2, tau2*RASmut_ss))*(1 - Gspry*HillEQ(FB2, kFB2, tauFB2))*(1 - G4*HillEQ(FB4, kFB4, tauFB4));
  ERK := (ERKb + (ERKt - ERKb)*HillEQ(MEK, k4, tau4))*(1 - Gdusp*HillEQ(FB1, kFB1, tauFB1));
  S6 := S6b + (S6t - S6b)*HillEQ(wOR*ERK + (1 - wOR)*AKT, k6, tau6);
  AKT := AKTb + (AKTt - AKTb)*HillEQ(PI3K, k8, tau8);
  PI3K := PI3Kb + (PI3Kt - PI3Kb)*HillEQ(RTK2 + wRAS*(RAS/V2 + RASmut/V2), k7, tau7*RASmut_ss);
  RTK1 := RTK1b + (RTK1t - RTK1b)*(1 - G13*HillEQ(FB3, kFB3, tauFB3));
  RTK2 := RTK2b + (RTK2t - RTK2b)*(1 - G23*HillEQ(FB3, kFB3, tauFB3));
  RASi_C1 := RASi_blood/V1;
  RASi_C2 := RASi_tumor/V2;

  // Reactions:
  fb1_synth: ERK => FB1 + ERK; r1*ERK - deg1*FB1;
  fb2_synth: ERK => xFB2 + ERK; r2*ERK - deg2*xFB2;
  fb3_synth: ERK => xFB3 + ERK; r3*ERK - deg3*xFB3;
  TD: S6 => TD1 + S6; r5*(S6 - TD1);
  cell_growth: TD1 => CELLS + TD1; (umax*HillEQ(TD1, kg, taug) - dmax)*CELLS*(1 - CELLS/Vmax);
  PK1a_RASi: RASi_gut => RASi_blood; ka*Fa*RASi_gut;
  PK2_RASi: RASi_blood => ; ke*RASi_blood;
  PK1b_RASi: RASi_gut => ; ka*(1 - Fa)*RASi_gut;
  PK3_RASi: RASi_blood -> RASi_tumor; k12*RASi_blood - k21*V1/V2*RASi_tumor;
  RAS_synth: => RAS_GDP; ksynth;
  RAS_GDP_deg: RAS_GDP => ; kdeg*RAS_GDP;
  RAS_deg: RAS => ; kdeg*RAS;
  RASmut_deg: RASmut => ; kdeg*RASmut;
  RASmut_GDP_deg: RASmut_GDP => ; kdeg*RASmut_GDP;
  RASmut_GDPi_deg: RASmut_GDPi => ; kdeg*RASmut_GDPi;
  RAS_cycling: RAS_GDP -> RAS; kf*RAS_GDP*RTK1 - kr*RAS;
  RASmut_cycling: RASmut_GDP -> RASmut; kf_mut*RASmut_GDP - kr_mut*RASmut;
  RAS_inhibition: RASmut_GDP + RASi_tumor => RASmut_GDPi; kon/V2*RASmut_GDP*RASi_tumor*(1 - fb);
  RASmut_synth: => RASmut_GDP; ksynth_mut;
  PK4_RASi: RASi_blood -> RASi_peripheral; kp*RASi_blood - kp*V1/Vp*RASi_peripheral;
  fb3_delay: xFB3 => FB3; deg3*xFB3 - deg3*FB3;
  fb2_delay: xFB2 => FB2; deg2*xFB2 - deg2*FB2;
  fb4_symth: PI3K => xFB4 + PI3K; r4*PI3K - deg4*xFB4;
    fb4_symth_kf = 1;
  fb4_delay: xFB4 => FB4; deg4*xFB4 - deg4*FB4;
    fb4_delay_kf = 1;

  // Unit definitions:
  unit MWDERIVEDUNIT_1__hour = 2.777778e-4 dimensionless / second; MWDERIVEDUNIT_1__hour is "1/hour";
  unit MWDERIVEDUNIT_mole__hour = mole * 2.777778e-4 dimensionless / second; MWDERIVEDUNIT_mole__hour is "mole/hour";
end
